# Find minimum energy fcc configuration
# Mark Tschopp, 2010
# Modified by Abduljabar Alsayoud

# ---------- Initialize Simulation ---------------------
clear
units metal
dimension 3
boundary p p p
atom_style atomic


# ---------- Read Data ---------------------
# Read config files (get the structure from https://www.materialsproject.org/)
read_data Al_mp-134.data

# ---------- Define Interatomic Potential ---------------------
pair_style eam/alloy
pair_coeff * * AlCu.eam.alloy Al
neighbor 2.0 bin
neigh_modify delay 10 check yes

# ---------- Define Settings ---------------------
compute eng all pe/atom
compute eatoms all reduce sum c_eng

# ---------- Run Minimization ---------------------
reset_timestep 0
fix 1 all box/relax iso 0.0 vmax 0.001
thermo 10
thermo_style custom step pe lx ly lz press pxx pyy pzz c_eatoms
min_style cg
minimize 1e-25 1e-25 5000 10000
write_data optimized.data

variable natoms equal "count(all)"
#variable teng equal "c_eatoms"
variable length equal "lx"
#variable ecoh equal "v_teng/v_natoms"

#print "Total energy (eV) = ${teng};"
print "Number of atoms = ${natoms};"
print "Lattice constant (Angstoms) = ${length};"
#print "Cohesive energy (eV) = ${ecoh};"

print "All done!"
